*Heading
** Job name: Con03_Mid Model name: Model-1
** Generated by: Abaqus/CAE 6.14-1
*Preprint, echo=NO, model=NO, history=NO, contact=NO
**
** PARTS
**
*Part, name=Bottom
*Node
      1,  -1.79999995,           0.,  0.600000024
      2,  -1.79999995,  0.245256007,  0.600000024
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*Element, type=C3D8R
   1,   230,  3025,  6557,   783,     1,    13,   555,    62
   2,  3025,  3026,  6558,  6557,    13,    14,   556,   555
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*Nset, nset=_PickedSet10, internal, generate
     1,  20008,      1
*Elset, elset=_PickedSet10, internal, generate
     1,  16800,      1
** Section: Section-1
*Solid Section, elset=_PickedSet10, material=Material-1
,
*End Part
**
*Part, name=Left
*Node
      1, -0.300000012,  0.200000003,   1.20000005
      2, -0.300000012,  0.219778448,   1.05074537
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*Element, type=C3D8R
 1, 19, 20, 29, 28,  1,  2, 11, 10
 2, 20, 21, 30, 29,  2,  3, 12, 11
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*Nset, nset=_PickedSet4, internal, generate
  1,  54,   1
*Elset, elset=_PickedSet4, internal, generate
  1,  16,   1
** Section: Section-1
*Solid Section, elset=_PickedSet4, material=Material-1
,
*End Part
**
*Part, name=Right
*Node
      1, -0.300000012,  0.200000003,   1.20000005
      2, -0.300000012,  0.219778448,   1.05074537
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*Element, type=C3D8R
 1, 19, 20, 29, 28,  1,  2, 11, 10
 2, 20, 21, 30, 29,  2,  3, 12, 11
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*Nset, nset=_PickedSet4, internal, generate
  1,  54,   1
*Elset, elset=_PickedSet4, internal, generate
  1,  16,   1
** Section: Section-1
*Solid Section, elset=_PickedSet4, material=Material-1
,
*End Part
**
*Part, name=SideWalls
*Node
      1,           0.,  0.955072939,   1.85000002
      2,           0.,   1.15507293,   1.85000002
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*Element, type=C3D8R
  1,   1,  20,  19,  11,  31,  50,  49,  41
  2,  19,  20,  21,   3,  49,  50,  51,  33
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*Nset, nset=_PickedSet5, internal, generate
   1,  180,    1
*Elset, elset=_PickedSet5, internal, generate
   1,  100,    1
** Section: Section-1
*Solid Section, elset=_PickedSet5, material=Material-1
,
*End Part
**
*Part, name=Up
*End Part
**
**
** ASSEMBLY
**
*Assembly, name=Assembly
**
*Instance, name=Bottom-1, part=Bottom
*End Instance
**
*Instance, name=Left-1, part=Left
0.300000003278255,           0.,           0.
*End Instance
**
*Instance, name=Right-1, part=Right
-1.79999999344349,           0.,           0.
*End Instance
**
*Instance, name=SideWalls-1, part=SideWalls
0.30000000327825,    -0.955073,        -0.65
*End Instance
**
*Instance, name=Up-1, part=Up
        -1.3, -8.00474399328232,          0.6
*Node
      1,   1.93649173,         8.75,         0.75
*Nset, nset=Up-1-RefPt_, internal
1,
*Surface, type=CYLINDER, name=RigidSurface_, internal
START, 1.93649167311142, 8.75000000000427
 CIRCL,           0., 8.24999999999512,           0.,        12.25
 CIRCL, -1.93649167311378,         8.75,           0.,        12.25
*Rigid Body, ref node=Up-1-RefPt_, analytical surface=RigidSurface_
*End Instance
**
*Nset, nset=_PickedSet22, internal, instance=Up-1
 1,
*Nset, nset=_PickedSet23, internal, instance=Up-1
 1,
*Nset, nset=_PickedSet24, internal, instance=Up-1
 1,
*Nset, nset=_PickedSet25, internal, instance=SideWalls-1
   5,   6,  13,  14,  15,  16
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*Elset, elset=_PickedSet25, internal, instance=SideWalls-1
  8,  9, 10, 15, 17, 28
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*Nset, nset=_PickedSet26, internal, instance=Up-1
 1,
*Elset, elset=__PickedSurf123_S6, internal, instance=SideWalls-1
  1,  7, 12, 21, 27, 32, 41, 47, 52, 61, 67, 72, 81, 87, 92
*Elset, elset=__PickedSurf123_S4, internal, instance=SideWalls-1
  5, 16, 25, 36, 45, 56, 65, 76, 85, 96
*Surface, type=ELEMENT, name=_PickedSurf123, internal
__PickedSurf123_S6, S6
__PickedSurf123_S4, S4
*Elset, elset=__PickedSurf124_S6, internal, instance=Bottom-1, generate
    1,  8394,     7
*Elset, elset=__PickedSurf124_S6, internal, instance=Left-1
 1, 9
*Elset, elset=__PickedSurf124_S6, internal, instance=Right-1
 1, 9
*Elset, elset=__PickedSurf124_S5, internal, instance=Bottom-1
   134,   135,   136,   137,   138,   139
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*Elset, elset=__PickedSurf124_S5, internal, instance=Left-1, generate
  1,  16,   1
*Elset, elset=__PickedSurf124_S5, internal, instance=Right-1, generate
  1,  16,   1
*Elset, elset=__PickedSurf124_S4, internal, instance=Bottom-1, generate
  8407,  16800,      7
*Elset, elset=__PickedSurf124_S4, internal, instance=Left-1
  8, 16
*Elset, elset=__PickedSurf124_S4, internal, instance=Right-1
  8, 16
*Surface, type=ELEMENT, name=_PickedSurf124, internal
__PickedSurf124_S6, S6
__PickedSurf124_S5, S5
__PickedSurf124_S4, S4
*Elset, elset=__PickedSurf142_S1, internal, instance=Bottom-1
  8261,  8262,  8263,  8264,  8265,  8266
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*Elset, elset=__PickedSurf142_S2, internal, instance=Bottom-1
    1,    2,    3,    4,    5,    6
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*Surface, type=ELEMENT, name=_PickedSurf142, internal
__PickedSurf142_S1, S1
__PickedSurf142_S2, S2
*Elset, elset=__PickedSurf143_S2, internal, instance=Left-1, generate
 1,  8,  1
*Elset, elset=__PickedSurf143_S1, internal, instance=Right-1, generate
  9,  16,   1
*Surface, type=ELEMENT, name=_PickedSurf143, internal
__PickedSurf143_S2, S2
__PickedSurf143_S1, S1
*Elset, elset=__PickedSurf145_S6, internal, instance=Bottom-1, generate
  8401,  16794,      7
*Elset, elset=__PickedSurf145_S4, internal, instance=Bottom-1, generate
    7,  8400,     7
*Surface, type=ELEMENT, name=_PickedSurf145, internal
__PickedSurf145_S6, S6
__PickedSurf145_S4, S4
** Constraint: Constraint-1
*Tie, name=Constraint-1, adjust=yes
_PickedSurf124, _PickedSurf123
** Constraint: Constraint-2
*Tie, name=Constraint-2, adjust=yes
_PickedSurf143, _PickedSurf142
*Elset, elset=__Int-1_ssm_1_S6, internal, instance=Bottom-1, generate
  8401,  16794,      7
*Surface, type=ELEMENT, name=_Int-1_ssm_1, internal
__Int-1_ssm_1_S6, S6
*Elset, elset=__Int-1_ssm_2_S4, internal, instance=Bottom-1, generate
    7,  8400,     7
*Surface, type=ELEMENT, name=_Int-1_ssm_2, internal
__Int-1_ssm_2_S4, S4
*End Assembly
**
** MATERIALS
**
*Material, name=Material-1
*Elastic
207000., 0.3
*Plastic
 200.2,     0.
  246., 0.0235
  294., 0.0474
  374., 0.0935
  437., 0.1377
  480.,   0.18
**
** INTERACTION PROPERTIES
**
*Surface Interaction, name=IntProp-1
1.,
*Friction, slip tolerance=0.005
 0.62,
*Surface Behavior, pressure-overclosure=HARD
*Surface Smoothing, name=Int-1
_Int-1_ssm_1, , CIRCUMFERENTIAL, 0., -3.75474, 0.6, -1., -3.75474, 0.6
_Int-1_ssm_2, , CIRCUMFERENTIAL, 0., -3.75474, 0.6, -1., -3.75474, 0.6
**
** INTERACTIONS
**
** Interaction: Int-1
*Contact Pair, interaction=IntProp-1, type=SURFACE TO SURFACE, adjust=0.0, geometric correction=Int-1
_PickedSurf145, Up-1.RigidSurface_
** ----------------------------------------------------------------
**
** STEP: Load
**
*Step, name=Load, nlgeom=NO, inc=500
*Static
0.001, 0.1, 1e-09, 0.1
**
** BOUNDARY CONDITIONS
**
** Name: BC-Load Type: Displacement/Rotation
*Boundary
_PickedSet24, 3, 3
** Name: BC-SideWalls Type: Symmetry/Antisymmetry/Encastre
*Boundary
_PickedSet25, ENCASTRE
** Name: BC-Up Type: Displacement/Rotation
*Boundary
_PickedSet26, 1, 1
_PickedSet26, 4, 4
_PickedSet26, 5, 5
_PickedSet26, 6, 6
**
** LOADS
**
** Name: Load   Type: Concentrated force
*Cload
_PickedSet22, 2, -100.
**
** OUTPUT REQUESTS
**
*Restart, write, frequency=0
**
** FIELD OUTPUT: F-Output-1
**
*Output, field, variable=PRESELECT
**
** HISTORY OUTPUT: H-Output-1
**
*Output, history, variable=PRESELECT
*End Step
** ----------------------------------------------------------------
**
** STEP: Displacement
**
*Step, name=Displacement, nlgeom=NO, inc=500
*Static
0.003, 0.05, 5e-09, 0.05
**
** BOUNDARY CONDITIONS
**
** Name: BC-Displacement Type: Displacement/Rotation
*Boundary, op=NEW
_PickedSet23, 1, 1, 0.6
** Name: BC-Load Type: Displacement/Rotation
*Boundary, op=NEW
** Name: BC-SideWalls Type: Symmetry/Antisymmetry/Encastre
*Boundary, op=NEW
_PickedSet25, ENCASTRE
** Name: BC-Up Type: Displacement/Rotation
*Boundary, op=NEW
_PickedSet26, 3, 3
_PickedSet26, 4, 4
_PickedSet26, 5, 5
_PickedSet26, 6, 6
**
** OUTPUT REQUESTS
**
*Restart, write, frequency=0
**
** FIELD OUTPUT: F-Output-1
**
*Output, field, variable=PRESELECT
**
** HISTORY OUTPUT: H-Output-1
**
*Output, history, variable=PRESELECT
*End Step
